x_0 := 0
y_0 := 0
L_1 := 1
x_1 := 0
y_1 := 0
L_2 := 1
x_2 := 0
y_2 := 0
L_3 := 1
x_3 := 2
y_3 := 1
Given
x_3 == x_0 + x_1 + x_2
y_3 == y_0 + y_1 + y_2
L_1^2 == (x_1 - x_0)^2 + (y_1 - y_0)^2
L_2^2 == (x_2 - x_1)^2 + (y_2 - y_1)^2
L_3^2 == (x_3 - x_2)^2 + (y_3 - y_2)^2
roots := Find(x_1, x_2, y_1, y_2) = [1; 1; -3.28355e-10; 1]
x := [x_0; roots[0]; roots[1]; x_3]
y := [y_0; roots[2]; roots[3]; y_3]
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