x_0 := 0
y_0 := 0
z_0 := 0
L_1 := 1
x_1 := 0
y_1 := 0
z_1 := 0
L_2 := 1
x_2 := 0
y_2 := 0
z_2 := 0
L_3 := 1
x_3 := 2.121
y_3 := 2.121
z_3 := 0
Given
x_3 == x_0 + x_1 + x_2
y_3 == y_0 + y_1 + y_2
z_3 == z_0 + z_1 + z_2
L_1^2 == (x_1 - x_0)^2 + (y_1 - y_0)^2 + (z_1 - z_0)^2
L_2^2 == (x_2 - x_1)^2 + (y_2 - y_1)^2 + (z_2 - z_1)^2
L_3^2 == (x_3 - x_2)^2 + (y_3 - y_2)^2 + (z_3 - z_2)^2
roots := Find(x_1, x_2, y_1, y_2, z_1, z_2) = [0.698364; 1.42264; 0.715742; 1.40526; 2.11108e-8; -2.11108e-8]
x := [x_0; roots[0]; roots[1]; x_3]
y := [y_0; roots[2]; roots[3]; y_3]
z := [z_0; roots[4]; roots[5]; z_3]
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