L_1 := 37 mm
L_2 := 58 mm
L_3 := 79 mm
P := [81.3; 81.3; -40]*mm
ϕ[.0] := acos(P[0]/sqrt(P[0]^2 + P[1]^2)) = 45 deg
P1 := [sqrt(P[0]^2 + P[1]^2); P[2]] = [0.114976; -0.04] m
ϕ_2 :=
    L_13 ← sqrt((P1[0] - L_1)^2 + (P1[1] - 0 m)^2)
    return acos((L_13^2 - L_2^2 - L_3^2)/(-2*L_2*L_3))
ϕ_1 :=
    L_03 ← sqrt(P1[0]^2 + P1[1]^2)
    L_13 ← sqrt((P1[0] - L_1)^2 + (P1[1] - 0 m)^2)
    ϕ_03 ← acos((L_03^2 - L_1^2 - L_13^2)/(-2*L_1*L_13))
    ϕ_13 ← acos((L_3^2 - L_2^2 - L_13^2)/(-2*L_2*L_13))
    ϕ ← ϕ_03 - ϕ_13 if P[2] > 0
    ϕ ← 360 deg - ϕ_03 - ϕ_13 if P[2] < 0
    return ϕ
ϕ[.0] = 45 deg
ϕ_1 = 145.353 deg
ϕ_2 = 77.8753 deg
