ϕ_1 := 0 deg
dx_01 := 1
dy_01 := 0
M[01] := [cos(ϕ_1), sin(ϕ_1), dx_01; -sin(ϕ_1), cos(ϕ_1), dy_01; 0, 0, 1] = [1, 0, 1; 0, 1, 0; 0, 0, 1]
x_0 := 0
y_0 := 0
c[1] := M[01]*[x_0; y_0; 1] = [1; 0; 1]
x_1 := c[1][0]
y_1 := c[1][1]
ϕ_2 := 75 deg
dx_12 := 1
dy_12 := 0
M_12 := [cos(ϕ_2), sin(ϕ_2), dx_12; -sin(ϕ_2), cos(ϕ_2), dy_12; 0, 0, 1] = [0.258819, 0.965926, 1; -0.965926, 0.258819, 0; 0, 0, 1]
c_2 := M_12*[x_1; y_1; 1] = [1.25882; -0.965926; 1]
[cos(ϕ_2), sin(ϕ_2), dx_12; -sin(ϕ_2), cos(ϕ_2), dy_12; 0, 0, 1]*[cos(ϕ_1), sin(ϕ_1), dx_01; -sin(ϕ_1), cos(ϕ_1), dy_01; 0, 0, 1]*[x_0; y_0; 1] = [1.25882; -0.965926; 1]
