# координаты вершин квадрата
v_x := [-40; -40; 40; 40]*mm
v_y := [-40; 40; 40; -40]*mm
v_z := [0; 0; 0; 0]*m
L_l := [37; 58; 79]*mm
Δx := 0 m
Δy := 0 m
Δz := 0 m
# [component: outputs ϕ]
# [component: outputs ψ]
# [component: outputs χ]
ψ := ψ*deg = 11 deg
ϕ := ϕ*deg = 10 deg
χ := χ*deg = 0 deg
# [area: platform]
M_χ := [cos(χ), -sin(χ), 0, Δx/m; sin(χ), cos(χ), 0, Δy/m; 0, 0, 1, Δz/m; 0, 0, 0, 1]
M_ϕ := [1, 0, 0, Δx/m; 0, cos(ϕ), -sin(ϕ), Δy/m; 0, sin(ϕ), cos(ϕ), Δz/m; 0, 0, 0, 1]
M_ψ := [cos(ψ), 0, sin(ψ), Δx/m; 0, 1, 0, Δy/m; -sin(ψ), 0, cos(ψ), Δz/m; 0, 0, 0, 1]
v_0 := M_ϕ*M_ψ*M_χ*[v_x[0]; v_y[0]; v_z[0]; 1 m] = [-0.0392651; -0.0407177; 0.00057048; 1] m
v_1 := M_ϕ*M_ψ*M_χ*[v_x[1]; v_y[1]; v_z[1]; 1 m] = [-0.0392651; 0.038067; 0.0144623; 1] m
v_2 := M_ϕ*M_ψ*M_χ*[v_x[2]; v_y[2]; v_z[2]; 1 m] = [0.0392651; 0.0407177; -0.00057048; 1] m
v_3 := M_ϕ*M_ψ*M_χ*[v_x[3]; v_y[3]; v_z[3]; 1 m] = [0.0392651; -0.038067; -0.0144623; 1] m
v1_x := [v_0[0]; v_1[0]; v_2[0]; v_3[0]] = [-0.0392651; -0.0392651; 0.0392651; 0.0392651] m
v1_y := [v_0[1]; v_1[1]; v_2[1]; v_3[1]] = [-0.0407177; 0.038067; 0.0407177; -0.038067] m
v1_z := [v_0[2]; v_1[2]; v_2[2]; v_3[2]] = [0.00057048; 0.0144623; -0.00057048; -0.0144623] m
# [area: legs]
LIMB(O, L_h, P) :=
    L_1 ← L_h[0]
    L_2 ← L_h[1]
    L_3 ← L_h[2]
    f_0 ← acos(P[0]/sqrt(P[0]^2 + P[1]^2))
    m_p1 ← 1
    if P[1] < 0
        f_0 ← -f_0
        m_p1 ← -1
    P1 ← [sqrt(P[0]^2 + P[1]^2); P[2]]
    f_2 ←
        L_13 ← sqrt((P1[0] - L_1)^2 + (P1[1] - 0 m)^2)
        f_2 ← acos((L_13^2 - L_2^2 - L_3^2)/(-2*L_2*L_3))
    f_1 ←
        L_03 ← sqrt(P1[0]^2 + P1[1]^2)
        L_13 ← sqrt((P1[0] - L_1)^2 + (P1[1] - 0 m)^2)
        ϕ_03 ← acos((L_03^2 - L_1^2 - L_13^2)/(-2*L_1*L_13))
        ϕ_13 ← acos((L_3^2 - L_2^2 - L_13^2)/(-2*L_2*L_13))
        ϕ1 ← ϕ_03 - ϕ_13 if P[2] > 0
        ϕ1 ← 360 deg - ϕ_03 - ϕ_13 if P[2] < 0
        f_1 ← ϕ1
    f_φ ← [f_0; f_0]
    L_f1 ← sqrt(L_1^2 + L_2^2 - 2*L_1*L_2*cos(f_1))
    f_θ ← [90 deg; 90 deg - acos((L_2^2 - L_f1^2 - L_1^2)/(-2*L_f1*L_1))]
    x1 ← [L_1*sin(f_θ[0])*cos(f_φ[0]); L_f1*sin(f_θ[1])*cos(f_φ[1]); P[0]]
    y1 ← [L_1*sin(f_θ[0])*sin(f_φ[0]); L_f1*sin(f_θ[1])*sin(f_φ[1]); P[1]]
    z1 ← [L_1*cos(f_θ[0]); L_f1*cos(f_θ[1]); P[2]]
    A_1 ← M_ϕ*M_ψ*[x1[0]; y1[0]; z1[0]; 1 m]
    x ← [O[0]; O[0] + A_1[0]; O[0] + x1[1]; O[0] + x1[2]]
    y ← [O[1]; O[1] + A_1[1]; O[1] + y1[1]; O[1] + y1[2]]
    z ← [O[2]; O[2] + A_1[2]; O[2] + z1[1]; O[2] + z1[2]]
    return [x; y; z]
l0 := LIMB([v1_x[0]; v1_y[0]; v1_z[0]], L_l, [-30; -80; -79]*mm - ([v1_x[0]; v1_y[0]; v1_z[0]] - [v_x[0]; v_y[0]; v_z[0]])) = [
    [-0.0392651; -0.0523932; -0.0735987; -0.07]; [-0.0407177; -0.0751351; -0.129283; -0.12]; [0.00057048; -0.00290704; 0.00177086; -0.079]
] m
l1 := LIMB([v1_x[1]; v1_y[1]; v1_z[1]], L_l, [-30; 80; -79]*mm - ([v1_x[1]; v1_y[1]; v1_z[1]] - [v_x[1]; v_y[1]; v_z[1]])) = [
    [-0.0392651; -0.0520216; -0.0719697; -0.07]; [0.038067; 0.0717529; 0.125251; 0.12]; [0.0144623; 0.0229199; 0.029124; -0.079]
] m
l2 := LIMB([v1_x[2]; v1_y[2]; v1_z[2]], L_l, [30; 80; -79]*mm - ([v1_x[2]; v1_y[2]; v1_z[2]] - [v_x[2]; v_y[2]; v_z[2]])) = [
    [0.0392651; 0.0523932; 0.0736032; 0.07]; [0.0407177; 0.0751351; 0.129295; 0.12]; [-0.00057048; 0.00290704; -0.000509487; -0.079]
] m
l3 := LIMB([v1_x[3]; v1_y[3]; v1_z[3]], L_l, [30; -80; -79]*mm - ([v1_x[3]; v1_y[3]; v1_z[3]] - [v_x[3]; v_y[3]; v_z[3]])) = [
    [0.0392651; 0.0520216; 0.0720065; 0.07]; [-0.038067; -0.0717529; -0.125349; -0.12]; [-0.0144623; -0.0229199; -0.000206827; -0.079]
] m
# [component: inputs transpose([stack(v1_y, l0[1], reverse(l0[1]), l1[1], reverse(l1[1]), l2[1], reverse(l2[1]), l3[1], reverse(l3[1])), stack(v1_x, l0[0], reverse(l0[0]), l1[0], reverse(l1[0]), l2[0], reverse(l2[0]), l3[0], reverse(l3[0])), stack(v1_z, l0[2], reverse(l0[2]), l1[2], reverse(l1[2]), l2[2], reverse(l2[2]), l3[2], reverse(l3[2]))])]
[30; 80; -79]*mm - ([v1_x[1]; v1_y[1]; v1_z[1]] - [v_x[1]; v_y[1]; v_z[1]]) = [29.2651; 81.933; -93.4623] mm
[-30; 80; -79]*mm - ([v1_x[1]; v1_y[1]; v1_z[1]] - [v_x[1]; v_y[1]; v_z[1]]) = [-30.7349; 81.933; -93.4623] mm
l2[0] = [39.2651; 52.3932; 73.6032; 70] mm
l2[1] = [40.7177; 75.1351; 129.295; 120] mm
l2[2] = [-0.57048; 2.90704; -0.509487; -79] mm
l3[0] = [39.2651; 52.0216; 72.0065; 70] mm
l3[1] = [-38.067; -71.7529; -125.349; -120] mm
l3[2] = [-14.4623; -22.9199; -0.206827; -79] mm
transpose([1; -1; 1; -1])*[1; 2; 3; 4] = -2
