# координаты вершин квадрата
v_x := [-40; -40; 40; 40]*mm
v_y := [-40; 40; 40; -40]*mm
v_z := [0; 0; 0; 0]*m
L_l := [37; 58; 79]*mm
Δx := 0 m
Δy := 0 m
Δz := 0 m
# [component: outputs ϕ]
# [component: outputs ψ]
# [component: outputs χ]
ψ := ψ*deg = 0 deg
ϕ := ϕ*deg = 0 deg
χ := χ*deg = 45 deg
# [area: platform]
M_χ := [cos(χ), -sin(χ), 0, Δx/m; sin(χ), cos(χ), 0, Δy/m; 0, 0, 1, Δz/m; 0, 0, 0, 1]
M_ϕ := [1, 0, 0, Δx/m; 0, cos(ϕ), -sin(ϕ), Δy/m; 0, sin(ϕ), cos(ϕ), Δz/m; 0, 0, 0, 1]
M_ψ := [cos(ψ), 0, sin(ψ), Δx/m; 0, 1, 0, Δy/m; -sin(ψ), 0, cos(ψ), Δz/m; 0, 0, 0, 1]
v_0 := M_ϕ*M_ψ*M_χ*[v_x[0]; v_y[0]; v_z[0]; 1 m] = [0; -0.0565685; 0; 1] m
v_1 := M_ϕ*M_ψ*M_χ*[v_x[1]; v_y[1]; v_z[1]; 1 m] = [-0.0565685; 0; 0; 1] m
v_2 := M_ϕ*M_ψ*M_χ*[v_x[2]; v_y[2]; v_z[2]; 1 m] = [0; 0.0565685; 0; 1] m
v_3 := M_ϕ*M_ψ*M_χ*[v_x[3]; v_y[3]; v_z[3]; 1 m] = [0.0565685; 0; 0; 1] m
v1_x := [v_0[0]; v_1[0]; v_2[0]; v_3[0]] = [0; -0.0565685; 0; 0.0565685] m
v1_y := [v_0[1]; v_1[1]; v_2[1]; v_3[1]] = [-0.0565685; 0; 0.0565685; 0] m
v1_z := [v_0[2]; v_1[2]; v_2[2]; v_3[2]] = [0; 0; 0; 0] m
# [area: legs]
LIMB(O, L_h, P) :=
    L_1 ← L_h[0]
    L_2 ← L_h[1]
    L_3 ← L_h[2]
    f_0 ← acos(P[0]/sqrt(P[0]^2 + P[1]^2))
    m_p1 ← 1
    if P[1] < 0
        f_0 ← -f_0
        m_p1 ← -1
    P1 ← [sqrt(P[0]^2 + P[1]^2); P[2]]
    f_2 ←
        L_13 ← sqrt((P1[0] - L_1)^2 + (P1[1] - 0 m)^2)
        f_2 ← acos((L_13^2 - L_2^2 - L_3^2)/(-2*L_2*L_3))
    f_1 ←
        L_03 ← sqrt(P1[0]^2 + P1[1]^2)
        L_13 ← sqrt((P1[0] - L_1)^2 + (P1[1] - 0 m)^2)
        ϕ_03 ← acos((L_03^2 - L_1^2 - L_13^2)/(-2*L_1*L_13))
        ϕ_13 ← acos((L_3^2 - L_2^2 - L_13^2)/(-2*L_2*L_13))
        ϕ1 ← ϕ_03 - ϕ_13 if P[2] > 0
        ϕ1 ← 360 deg - ϕ_03 - ϕ_13 if P[2] < 0
        f_1 ← ϕ1
    f_φ ← [f_0; f_0]
    L_f1 ← sqrt(L_1^2 + L_2^2 - 2*L_1*L_2*cos(f_1))
    f_θ ← [90 deg; 90 deg - acos((L_2^2 - L_f1^2 - L_1^2)/(-2*L_f1*L_1))]
    x1 ← [L_1*sin(f_θ[0])*cos(f_φ[0]); L_f1*sin(f_θ[1])*cos(f_φ[1]); P[0]]
    y1 ← [L_1*sin(f_θ[0])*sin(f_φ[0]); L_f1*sin(f_θ[1])*sin(f_φ[1]); P[1]]
    z1 ← [L_1*cos(f_θ[0]); L_f1*cos(f_θ[1]); P[2]]
    A_1 ← M_ϕ*M_ψ*[x1[0]; y1[0]; z1[0]; 1 m]
    x ← [O[0]; O[0] + A_1[0]; O[0] + x1[1]; O[0] + x1[2]]
    y ← [O[1]; O[1] + A_1[1]; O[1] + y1[1]; O[1] + y1[2]]
    z ← [O[2]; O[2] + A_1[2]; O[2] + z1[1]; O[2] + z1[2]]
    return [x; y; z]
l0 := LIMB([v1_x[0]; v1_y[0]; v1_z[0]], L_l, [-30; -80; -79]*mm - ([v1_x[0]; v1_y[0]; v1_z[0]] - [v_x[0]; v_y[0]; v_z[0]])) = [
    [0; -0.0274177; -0.0703968; -0.07]; [-0.0565685; -0.0814135; -0.12036; -0.12]; [0; 0; 1.81467e-6; -0.079]
] m
l1 := LIMB([v1_x[1]; v1_y[1]; v1_z[1]], L_l, [-30; 80; -79]*mm - ([v1_x[1]; v1_y[1]; v1_z[1]] - [v_x[1]; v_y[1]; v_z[1]])) = [
    [-0.0565685; -0.0606842; -0.0671174; -0.07]; [0; 0.0367704; 0.0942465; 0.12]; [0; 0; 0.00437126; -0.079]
] m
l2 := LIMB([v1_x[2]; v1_y[2]; v1_z[2]], L_l, [30; 80; -79]*mm - ([v1_x[2]; v1_y[2]; v1_z[2]] - [v_x[2]; v_y[2]; v_z[2]])) = [[0; 0.0274177; 0.0703968; 0.07]; [0.0565685; 0.0814135; 0.12036; 0.12]; [0; 0; 1.81467e-6; -0.079]] m
l3 := LIMB([v1_x[3]; v1_y[3]; v1_z[3]], L_l, [30; -80; -79]*mm - ([v1_x[3]; v1_y[3]; v1_z[3]] - [v_x[3]; v_y[3]; v_z[3]])) = [
    [0.0565685; 0.0606842; 0.0671174; 0.07]; [0; -0.0367704; -0.0942465; -0.12]; [0; 0; 0.00437126; -0.079]
] m
# [component: inputs transpose([stack(v1_y, l0[1], reverse(l0[1]), l1[1], reverse(l1[1]), l2[1], reverse(l2[1]), l3[1], reverse(l3[1])), stack(v1_x, l0[0], reverse(l0[0]), l1[0], reverse(l1[0]), l2[0], reverse(l2[0]), l3[0], reverse(l3[0])), stack(v1_z, l0[2], reverse(l0[2]), l1[2], reverse(l1[2]), l2[2], reverse(l2[2]), l3[2], reverse(l3[2]))])]
[30; 80; -79]*mm - ([v1_x[1]; v1_y[1]; v1_z[1]] - [v_x[1]; v_y[1]; v_z[1]]) = [46.5685; 120; -79] mm
[-30; 80; -79]*mm - ([v1_x[1]; v1_y[1]; v1_z[1]] - [v_x[1]; v_y[1]; v_z[1]]) = [-13.4315; 120; -79] mm
l2[0] = [0; 27.4177; 70.3968; 70] mm
l2[1] = [56.5685; 81.4135; 120.36; 120] mm
l2[2] = [0; 0; 0.00181467; -79] mm
l3[0] = [56.5685; 60.6842; 67.1174; 70] mm
l3[1] = [0; -36.7704; -94.2465; -120] mm
l3[2] = [0; 0; 4.37126; -79] mm
